# Track 1-2
x := 27541 - 22513 = 5028
y := 25884 - 75141 = -49257
dist := sqrt(x^2 + y^2) = 49513
# Track 1-3
x := 27541 - 15245 = 12296
y := 25884 - 24154 = 1730
dist := sqrt(x^2 + y^2) = 12417.1
# Track 1-4
x := 27541 - 30245 = -2704
y := 25884 - 28884 = -3000
dist := sqrt(x^2 + y^2) = 4038.76
# track 2-3
x := 22513 - 15245 = 7268
y := 75141 - 24154 = 50987
dist := sqrt(x^2 + y^2) = 51502.4
# track 2-4
x := 22513 - 30245 = -7732
y := 75141 - 28884 = 46257
dist := sqrt(x^2 + y^2) = 46898.8
# track 3-4
x := 15245 - 30245 = -15000
y := 24154 - 28884 = -4730
dist := sqrt(x^2 + y^2) = 15728.1
